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/BATCH
/COM,ANSYS RELEASE 2021 R2           BUILD 21.2      UP20210601       19:00:57
/input,menust,tmp,''
/GST,ON
/PLO,INFO,3
/GRO,CURL,ON
/CPLANE,1
WPSTYLE,,,,,,,,0
/NOPR
KEYW,PR_SET,1
KEYW,PR_STRUC,1
KEYW,PR_THERM,0
KEYW,PR_FLUID,0
KEYW,PR_ELMAG,0
KEYW,MAGNOD,0
KEYW,MAGEDG,0
KEYW,MAGHFE,0
KEYW,MAGELC,0
KEYW,PR_MULTI,0
/GO
/COM,
/COM,Preferences for GUI filtering have been set to display:
/COM,  Structural
/PREP7
ET,1,BEAM188
et,1,shell63
R,1,0.011,0.011,0.011,0.011, , ,
RMORE, , , ,
RMORE
RMORE, ,
MPTEMP,,,,,,,,
MPTEMP,1,0
MPDATA,EX,1,,2e11
MPDATA,PRXY,1,,0.3
MPTEMP,,,,,,,,
MPTEMP,1,0
MPDATA,DENS,1,,7850
SECTYPE,   1, BEAM, T, stiff, 0
SECOFFSET, CENT
SECDATA,0.3,0.311,0.011,0.011,0,0,0,0,0,0,0,0
SECTYPE,   1, BEAM, T, stiff, 0
SECOFFSET, CENT
SECDATA,0.3,0.311,0.011,0.011,0,0,0,0,0,0,0,0
K,1,0,0,0,
K,2,15,0,0,
K,3,30,0,0,
K,4,0,6.5,0,
K,5,15,6.5,0,
K,6,30,6.5,0,
K,7,0,13,0,
K,8,15,13,0,
K,9,30,13,0,
FLST,2,4,3
FITEM,2,4
FITEM,2,5
FITEM,2,2
FITEM,2,1
A,P51X
FLST,2,4,3
FITEM,2,7
FITEM,2,8
FITEM,2,5
FITEM,2,4
A,P51X
FLST,2,4,3
FITEM,2,8
FITEM,2,9
FITEM,2,6
FITEM,2,5
A,P51X
FLST,2,4,3
FITEM,2,3
FITEM,2,6
FITEM,2,5
FITEM,2,2
A,P51X
FLST,2,4,5,ORDE,2
FITEM,2,1
FITEM,2,-4
AESIZE,P51X,0.3,
MSHAPE,0,2D
MSHKEY,0
FLST,5,4,5,ORDE,2
FITEM,5,1
FITEM,5,-4
CM,_Y,AREA
ASEL, , , ,P51X
CM,_Y1,AREA
CHKMSH,'AREA'
CMSEL,S,_Y
AMESH,_Y1
CMDELE,_Y
CMDELE,_Y1
CMDELE,_Y2
FLST,5,6,4,ORDE,6
FITEM,5,1
FITEM,5,-2
FITEM,5,6
FITEM,5,-7
FITEM,5,9
FITEM,5,-10
CM,_Y,LINE
LSEL, , , ,P51X
CM,_Y1,LINE
CMSEL,,_Y
LESIZE,_Y1,0.3, , , , , , ,1
FINISH
/SOL
FLST,2,9,4,ORDE,4
FITEM,2,3
FITEM,2,-5
FITEM,2,7
FITEM,2,-12
/GO
DL,P51X, ,UX,
FLST,2,12,4,ORDE,2
FITEM,2,1
FITEM,2,-12
FINISH
! /EXIT,NOSAV
/BATCH
/COM,ANSYS RELEASE 2021 R2           BUILD 21.2      UP20210601       19:27:48
/input,menust,tmp,''
/GST,ON
/PLO,INFO,3
/GRO,CURL,ON
/CPLANE,1
WPSTYLE,,,,,,,,0
/PREP7
ET,1,BEAM188
ET,2,BEAM188
ETDEL,2
et,1,shell63
R,1,0.011,0.011,0.011,0.011, , ,
RMORE, , , ,
RMORE
RMORE, ,
MPTEMP,,,,,,,,
MPTEMP,1,0
MPDATA,EX,1,,2e11
MPDATA,PRXY,1,,0.3
MPTEMP,,,,,,,,
MPTEMP,1,0
MPDATA,DENS,1,,7850
SECTYPE,   1, BEAM, T, , 0
SECOFFSET, CENT
SECDATA,0.3,0.311,0.011,0.011,0,0,0,0,0,0,0,0
SECTYPE,   1, BEAM, T, , 0
SECOFFSET, CENT
SECDATA,0.3,0.311,0.011,0.011,0,0,0,0,0,0,0,0
K,1,0,0,0,
K,2,15,0,0,
K,3,30,0,0,
K,4,0,6.5,0,
K,5,15,6.5,0,
K,6,30,6.5,0,
K,7,0,15,0,
KDELE,       7
K,7,0,13,0,
K,8,15,13,0,
K,8,30,13,0,
K,8,30,13,0,
K,8,15,13,0,
K,8,15,13,0,
KDELE,       8
K,8,15,13,0,
K,9,30,13,0,
FLST,2,4,3
FITEM,2,7
FITEM,2,8
FITEM,2,5
FITEM,2,4
A,P51X
FLST,2,4,3
FITEM,2,4
FITEM,2,1
FITEM,2,2
FITEM,2,5
A,P51X
FLST,2,4,3
FITEM,2,8
FITEM,2,9
FITEM,2,6
FITEM,2,5
A,P51X
FLST,2,4,3
FITEM,2,5
FITEM,2,2
FITEM,2,3
FITEM,2,6
A,P51X
FLST,2,4,5,ORDE,2
FITEM,2,1
FITEM,2,-4
AESIZE,P51X,0.3,
FLST,2,4,5,ORDE,2
FITEM,2,1
FITEM,2,-4
AESIZE,P51X,0.3,
MSHAPE,0,2D
MSHKEY,0
FLST,5,4,5,ORDE,2
FITEM,5,1
FITEM,5,-4
CM,_Y,AREA
ASEL, , , ,P51X
CM,_Y1,AREA
CHKMSH,'AREA'
CMSEL,S,_Y
AMESH,_Y1
CMDELE,_Y
CMDELE,_Y1
CMDELE,_Y2
FLST,5,4,4,ORDE,4
FITEM,5,2
FITEM,5,-3
FITEM,5,7
FITEM,5,10
CM,_Y,LINE
LSEL, , , ,P51X
CM,_Y1,LINE
CMSEL,,_Y
LESIZE,_Y1,0.3, , , , , , ,1
FLST,2,4,4,ORDE,4
FITEM,2,2
FITEM,2,-3
FITEM,2,7
FITEM,2,10
LMESH,P51X
FINISH
! /EXIT,NOSAV
/BATCH
/COM,ANSYS RELEASE 2021 R2           BUILD 21.2      UP20210601       19:39:18
/input,menust,tmp,''
/GST,ON
/PLO,INFO,3
/GRO,CURL,ON
/CPLANE,1
WPSTYLE,,,,,,,,0
/NOPR
KEYW,PR_SET,1
KEYW,PR_STRUC,1
KEYW,PR_THERM,0
KEYW,PR_FLUID,0
KEYW,PR_ELMAG,0
KEYW,MAGNOD,0
KEYW,MAGEDG,0
KEYW,MAGHFE,0
KEYW,MAGELC,0
KEYW,PR_MULTI,0
/GO
/COM,
/COM,Preferences for GUI filtering have been set to display:
/COM,  Structural
/PREP7
ET,1,BEAM188
et,2,shell63
R,1,0.011,0.011,0.011,0.011, , ,
RMORE, , , ,
RMORE
RMORE, ,
MPTEMP,,,,,,,,
MPTEMP,1,0
MPDATA,EX,1,,2e11
MPDATA,PRXY,1,,0.3
MPTEMP,,,,,,,,
MPTEMP,1,0
MPDATA,DENS,1,,7850
SECTYPE,   1, BEAM, T, , 0
SECOFFSET, CENT
SECDATA,0.3,0.311,0.011,0.011,0,0,0,0,0,0,0,0
SECTYPE,   1, BEAM, T, , 0
SECOFFSET, CENT
SECDATA,0.3,0.311,0.011,0.011,0,0,0,0,0,0,0,0
K,1,0,0,0,
K,2,15,0,0,
K,3,30,0,0,
K,4,0,6.5,0,
K,5,15,6.5,0,
K,6,30,6.5,0,
K,7,0,13,0,
K,8,15,13,0,
K,9,30,13,0,
FLST,2,4,3
FITEM,2,7
FITEM,2,8
FITEM,2,5
FITEM,2,4
A,P51X
FLST,2,4,3
FITEM,2,9
FITEM,2,8
FITEM,2,5
FITEM,2,6
A,P51X
FLST,2,4,3
FITEM,2,4
FITEM,2,5
FITEM,2,2
FITEM,2,1
A,P51X
FLST,2,4,3
FITEM,2,5
FITEM,2,6
FITEM,2,3
FITEM,2,2
A,P51X
FLST,2,4,5,ORDE,2
FITEM,2,1
FITEM,2,-4
AESIZE,P51X,0.3,
MSHAPE,0,2D
MSHKEY,0
FLST,5,4,5,ORDE,2
FITEM,5,1
FITEM,5,-4
CM,_Y,AREA
ASEL, , , ,P51X
CM,_Y1,AREA
CHKMSH,'AREA'
CMSEL,S,_Y
AMESH,_Y1
CMDELE,_Y
CMDELE,_Y1
CMDELE,_Y2
FLST,5,5,4,ORDE,5
FITEM,5,2
FITEM,5,-3
FITEM,5,5
FITEM,5,-6
FITEM,5,8
CM,_Y,LINE
LSEL, , , ,P51X
CM,_Y1,LINE
CMSEL,,_Y
LESIZE,_Y1,0.3, , , , , , ,1
FLST,2,4,4,ORDE,4
FITEM,2,2
FITEM,2,-3
FITEM,2,6
FITEM,2,8
LMESH,P51X
FLST,5,4,4,ORDE,4
FITEM,5,2
FITEM,5,-3
FITEM,5,6
FITEM,5,8
CM,_Y,LINE
LSEL, , , ,P51X
CM,_Y1,LINE
CMSEL,,_Y
LESIZE,_Y1,0.3, , , , , , ,1
FLST,2,4,4,ORDE,4
FITEM,2,2
FITEM,2,-3
FITEM,2,6
FITEM,2,8
LMESH,P51X
FLST,2,8,4,ORDE,6
FITEM,2,1
FITEM,2,4
FITEM,2,-5
FITEM,2,7
FITEM,2,9
FITEM,2,-12
/GO
DL,P51X, ,UX,
FLST,2,8,4,ORDE,6
FITEM,2,1
FITEM,2,4
FITEM,2,-5
FITEM,2,7
FITEM,2,9
FITEM,2,-12
/GO
DL,P51X, ,UY,
FLST,2,8,4,ORDE,6
FITEM,2,1
FITEM,2,4
FITEM,2,-5
FITEM,2,7
FITEM,2,9
FITEM,2,-12
/GO
DL,P51X, ,UZ,
ANTYPE,2
MODOPT,LANB,10
EQSLV,SPAR
MXPAND,10, , ,0
LUMPM,0
PSTRES,0
MODOPT,LANB,10,0,0, ,OFF
/SHRINK,0
/ESHAPE,1.0
/EFACET,1
/RATIO,1,1,1
/CFORMAT,32,0
/SHRINK,0
/ESHAPE,0.0
/EFACET,1
/RATIO,1,1,1
/CFORMAT,32,0
/SHRINK,0
/ESHAPE,1.0
/EFACET,1
/RATIO,1,1,1
/CFORMAT,32,0
SECTYPE,   1, BEAM, T, , 0
SECOFFSET, ORIG
SECDATA,0.3,0.311,0.011,0.011,0,0,0,0,0,0,0,0
SECTYPE,   1, BEAM, T, , 0
SECOFFSET, USER, 0, 0.311
SECDATA,0.3,0.311,0.011,0.011,0,0,0,0,0,0,0,0
ALLSEL,ALL
FINISH
/SOL
/STATUS,SOLU
SOLVE
! set, list command
FINISH
/POST1
SET,FIRST
/EFACET,1
PLNSOL, U,Y, 0,1.0
/EFACET,1
PLNSOL, U,Z, 0,1.0
/EFACET,1
PLNSOL, U,Z, 0,1.0
set, list command
SAVE
SAVE
SAVE
FINISH
! /EXIT,ALL
/BATCH
/COM,ANSYS RELEASE 2021 R2           BUILD 21.2      UP20210601       19:53:21
/input,menust,tmp,''
/GST,ON
/PLO,INFO,3
/GRO,CURL,ON
/CPLANE,1
WPSTYLE,,,,,,,,0
RESUME
/COM,ANSYS RELEASE 2021 R2           BUILD 21.2      UP20210601       19:53:26
/POST1
SET,FIRST
/EFACET,1
PLNSOL, U,Z, 0,1.0
SET,FIRST
FINISH
! /EXIT,ALL
/BATCH
/COM,ANSYS RELEASE 2021 R2           BUILD 21.2      UP20210601       19:54:02
/input,menust,tmp,''
/GST,ON
/PLO,INFO,3
/GRO,CURL,ON
/CPLANE,1
WPSTYLE,,,,,,,,0
RESUME
/COM,ANSYS RELEASE 2021 R2           BUILD 21.2      UP20210601       19:54:04
/POST1
SET,FIRST
PLDISP,0
/EFACET,1
PLNSOL, U,Z, 0,1.0
SAVE
FINISH
! /EXIT,ALL
/BATCH
/COM,ANSYS RELEASE 2021 R2           BUILD 21.2      UP20210601       03:37:15
/input,menust,tmp,''
/GST,ON
/PLO,INFO,3
/GRO,CURL,ON
/CPLANE,1
WPSTYLE,,,,,,,,0
RESUME
/COM,ANSYS RELEASE 2021 R2           BUILD 21.2      UP20210601       03:37:18
RESUME
/COM,ANSYS RELEASE 2021 R2           BUILD 21.2      UP20210601       03:37:26
/POST1
SET,LIST,999
SET,,, ,,, ,1
/EFACET,1
PLNSOL, U,SUM, 0,1.0
SET,LIST,999
SET,,, ,,, ,2
/EFACET,1
PLNSOL, U,SUM, 0,1.0
PLDISP,1
SET,LIST,999
FINISH
! /EXIT,ALL
/BATCH
/COM,ANSYS RELEASE 2021 R2           BUILD 21.2      UP20210601       05:51:36
/input,menust,tmp,''
/GST,ON
/PLO,INFO,3
/GRO,CURL,ON
/CPLANE,1
WPSTYLE,,,,,,,,0
RESUME
/COM,ANSYS RELEASE 2021 R2           BUILD 21.2      UP20210601       05:51:39
/POST1
SET,LIST,999
SET,LIST,999
SET,,, ,,, ,2
/EFACET,1
PLNSOL, U,SUM, 0,1.0
SET,LIST,999
SET,,, ,,, ,1
/EFACET,1
PLNSOL, U,SUM, 0,1.0
SET,LIST,999
SET,,, ,,, ,3
/EFACET,1
PLNSOL, U,SUM, 0,1.0
SET,LIST,999
SET,,, ,,, ,4
/EFACET,1
PLNSOL, U,SUM, 0,1.0
SET,LIST,999
SET,,, ,,, ,5
/EFACET,1
PLNSOL, U,SUM, 0,1.0
SET,LIST,999
SET,,, ,,, ,6
/EFACET,1
PLNSOL, U,SUM, 0,1.0
FINISH
! /EXIT,ALL
/BATCH
/COM,ANSYS RELEASE 2021 R2           BUILD 21.2      UP20210601       20:03:26
/input,menust,tmp,''
/GST,ON
/PLO,INFO,3
/GRO,CURL,ON
/CPLANE,1
WPSTYLE,,,,,,,,0
RESUME
/COM,ANSYS RELEASE 2021 R2           BUILD 21.2      UP20210601       20:03:32
FINISH
! /EXIT,NOSAV
