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/BATCH
/COM,ANSYS RELEASE 2021 R2           BUILD 21.2      UP20210601       03:04:57
/input,menust,tmp,''
/GST,ON
/PLO,INFO,3
/GRO,CURL,ON
/CPLANE,1
WPSTYLE,,,,,,,,0
/NOPR
KEYW,PR_SET,1
KEYW,PR_STRUC,1
KEYW,PR_THERM,0
KEYW,PR_FLUID,0
KEYW,PR_ELMAG,0
KEYW,MAGNOD,0
KEYW,MAGEDG,0
KEYW,MAGHFE,0
KEYW,MAGELC,0
KEYW,PR_MULTI,0
/GO
/COM,
/COM,Preferences for GUI filtering have been set to display:
/COM,  Structural
/PREP7
ET,1,BEAM3
MPTEMP,,,,,,,,
MPTEMP,1,0
MPDATA,EX,1,,2e11
MPDATA,PRXY,1,,0.3
MPTEMP,,,,,,,,
MPTEMP,1,0
MPDATA,DENS,1,,7850
SECTYPE,   1, BEAM, RECT, , 0
SECOFFSET, CENT
SECDATA,0.4,1.2,0,0,0,0,0,0,0,0,0,0
SECTYPE,   1, BEAM, RECT, , 0
SECOFFSET, CENT
SECDATA,0.4,1.2,0,0,0,0,0,0,0,0,0,0
K,1,0,,,
K,2,30,,,
K,2,30,,,
LSTR,       1,       2
FLST,5,1,4,ORDE,1
FITEM,5,1
CM,_Y,LINE
LSEL, , , ,P51X
CM,_Y1,LINE
CMSEL,,_Y
LESIZE,_Y1,0.3, , , , , , ,1
LMESH,       1
FINISH
/SOL
FLST,2,2,3,ORDE,2
FITEM,2,1
FITEM,2,-2
/GO
DK,P51X, , , ,0,ALL, , , , , ,
ANTYPE,2
MODOPT,LANB,6
EQSLV,SPAR
MXPAND,6, , ,0
LUMPM,0
PSTRES,0
MODOPT,LANB,6,0,0, ,OFF
/STATUS,SOLU
SOLVE
/SHRINK,0
/ESHAPE,1.0
/EFACET,1
/RATIO,1,1,1
/CFORMAT,32,0
/SHRINK,0
/ESHAPE,1
/EFACET,1
/RATIO,1,1,1
/CFORMAT,32,0
FINISH
! /EXIT,NOSAV
/BATCH
/COM,ANSYS RELEASE 2021 R2           BUILD 21.2      UP20210601       03:12:18
/input,menust,tmp,''
/GST,ON
/PLO,INFO,3
/GRO,CURL,ON
/CPLANE,1
WPSTYLE,,,,,,,,0
RESUME
/COM,ANSYS RELEASE 2021 R2           BUILD 21.2      UP20210601       03:12:24
/NOPR
KEYW,PR_SET,1
KEYW,PR_STRUC,1
KEYW,PR_THERM,0
KEYW,PR_FLUID,0
KEYW,PR_ELMAG,0
KEYW,MAGNOD,0
KEYW,MAGEDG,0
KEYW,MAGHFE,0
KEYW,MAGELC,0
KEYW,PR_MULTI,0
/GO
/COM,
/COM,Preferences for GUI filtering have been set to display:
/COM,  Structural
/PREP7
et,1,beam3
MPTEMP,,,,,,,,
MPTEMP,1,0
MPDATA,EX,1,,2e11
MPDATA,PRXY,1,,0.3
MPTEMP,,,,,,,,
MPTEMP,1,0
MPDATA,DENS,1,,7850
SECTYPE,   1, BEAM, RECT, , 0
SECOFFSET, CENT
SECDATA,0.4,1.2,0,0,0,0,0,0,0,0,0,0
K,1,0,0,0,
K,2,30,0,0,
LSTR,       1,       2
FLST,5,1,4,ORDE,1
FITEM,5,1
CM,_Y,LINE
LSEL, , , ,P51X
CM,_Y1,LINE
CMSEL,,_Y
LESIZE,_Y1,0.3, , , , , , ,1
LMESH,       1
/SHRINK,0
/ESHAPE,1.0
/EFACET,1
/RATIO,1,1,1
/CFORMAT,32,0
/SHRINK,0
/ESHAPE,1
/EFACET,1
/RATIO,1,1,1
/CFORMAT,32,0
/SHRINK,0
/ESHAPE,1
/EFACET,1
/RATIO,1,1,1
/CFORMAT,32,0
/SHRINK,0
/ESHAPE,1
/EFACET,1
/RATIO,1,1,1
/CFORMAT,32,0
FINISH
/SOL
FLST,2,2,3,ORDE,2
FITEM,2,1
FITEM,2,-2
/GO
DK,P51X, , , ,0,ALL, , , , , ,
ANTYPE,2
MODOPT,LANB,6
EQSLV,SPAR
MXPAND,6, , ,0
LUMPM,0
PSTRES,0
MODOPT,LANB,6,0,0, ,OFF
/STATUS,SOLU
SOLVE
FINISH
FINISH
/AUX12
! R,1,0.48,0.0064,0.4
FINISH
! /EXIT,NOSAV
/BATCH
/COM,ANSYS RELEASE 2021 R2           BUILD 21.2      UP20210601       03:23:24
/input,menust,tmp,''
/GST,ON
/PLO,INFO,3
/GRO,CURL,ON
/CPLANE,1
WPSTYLE,,,,,,,,0
/NOPR
KEYW,PR_SET,1
KEYW,PR_STRUC,1
KEYW,PR_THERM,0
KEYW,PR_FLUID,0
KEYW,PR_ELMAG,0
KEYW,MAGNOD,0
KEYW,MAGEDG,0
KEYW,MAGHFE,0
KEYW,MAGELC,0
KEYW,PR_MULTI,0
/GO
/COM,
/COM,Preferences for GUI filtering have been set to display:
/COM,  Structural
/PREP7
ET,1,BEAM3
R,1,0.48,0.0064,0.4
MPTEMP,,,,,,,,
MPTEMP,1,0
MPDATA,EX,1,,2e11
MPDATA,PRXY,1,,0.3
MPTEMP,,,,,,,,
MPTEMP,1,0
MPDATA,DENS,1,,7850
SECTYPE,   1, BEAM, RECT, , 0
SECOFFSET, CENT
SECDATA,0.4,1.2,0,0,0,0,0,0,0,0,0,0
K,1,0,,,
K,2,30,,,
K,2,30,,,
LSTR,       1,       2
FLST,5,1,4,ORDE,1
FITEM,5,1
CM,_Y,LINE
LSEL, , , ,P51X
CM,_Y1,LINE
CMSEL,,_Y
LESIZE,_Y1,0.3, , , , , , ,1
LMESH,       1
/SHRINK,0
/ESHAPE,1.0
/EFACET,1
/RATIO,1,1,1
/CFORMAT,32,0
FINISH
/SOL
FLST,2,2,3,ORDE,2
FITEM,2,1
FITEM,2,-2
/GO
DK,P51X, , , ,0,ALL, , , , , ,
ANTYPE,2
MODOPT,LANB,10
EQSLV,SPAR
MXPAND,10, , ,0
LUMPM,0
PSTRES,0
MODOPT,LANB,10,0,0, ,OFF
/STATUS,SOLU
SOLVE
FINISH
/POST1
SET,LIST,999
SAVE
SAVE
SET,LIST,999
SET,,, ,,, ,1
/EFACET,1
PLNSOL, U,Y, 0,1.0
SET,LIST,999
SET,,, ,,, ,2
/EFACET,1
PLNSOL, U,Y, 0,1.0
SET,LIST,999
SET,,, ,,, ,3
/EFACET,1
PLNSOL, U,Y, 0,1.0
set, list command
FINISH
! /EXIT,ALL
