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/BATCH
/COM,ANSYS RELEASE 2021 R2           BUILD 21.2      UP20210601       02:00:26
/input,menust,tmp,''
/GST,ON
/PLO,INFO,3
/GRO,CURL,ON
/CPLANE,1
WPSTYLE,,,,,,,,0
/NOPR
KEYW,PR_SET,1
KEYW,PR_STRUC,1
KEYW,PR_THERM,0
KEYW,PR_FLUID,0
KEYW,PR_ELMAG,0
KEYW,MAGNOD,0
KEYW,MAGEDG,0
KEYW,MAGHFE,0
KEYW,MAGELC,0
KEYW,PR_MULTI,0
/GO
/COM,
/COM,Preferences for GUI filtering have been set to display:
/COM,  Structural
/PREP7
ET,1,SHELL63
R,1,0.011,0.011,0.011,0.011, , ,
RMORE, , , ,
RMORE
RMORE, ,
K,1,0,0,0,
K,2,13,0,0,
K,3,13,30,0,
K,4,0,30,0,
FLST,2,4,3
FITEM,2,4
FITEM,2,3
FITEM,2,2
FITEM,2,1
A,P51X
FLST,2,1,5,ORDE,1
FITEM,2,1
AESIZE,P51X,0.3,
MSHAPE,0,2D
MSHKEY,0
CM,_Y,AREA
ASEL, , , ,       1
CM,_Y1,AREA
CHKMSH,'AREA'
CMSEL,S,_Y
AMESH,_Y1
CMDELE,_Y
CMDELE,_Y1
CMDELE,_Y2
FINISH
/SOL
FLST,2,4,4,ORDE,2
FITEM,2,1
FITEM,2,-4
/GO
DL,P51X, ,UX,
FLST,2,4,4,ORDE,2
FITEM,2,1
FITEM,2,-4
/GO
DL,P51X, ,UY,
FLST,2,4,4,ORDE,2
FITEM,2,1
FITEM,2,-4
/GO
DL,P51X, ,UZ,
ANTYPE,2
MODOPT,LANB,10
EQSLV,SPAR
MXPAND,10, , ,0
LUMPM,0
PSTRES,0
MODOPT,LANB,10,0,0, ,OFF
/STATUS,SOLU
SOLVE
FINISH
/PREP7
MPTEMP,,,,,,,,
MPTEMP,1,0
MPDATA,EX,1,,2e11
MPDATA,PRXY,1,,0.3
MPTEMP,,,,,,,,
MPTEMP,1,0
MPDATA,DENS,1,,7850
FINISH
/SOL
/STATUS,SOLU
SOLVE
FINISH
/POST1
SET,LIST,999
SET,LIST,999
SET,LIST,999
SET,LIST,999
SET,LIST,999
FINISH
/SOL
ANTYPE,2
MODOPT,LANB,20
EQSLV,SPAR
MXPAND,20, , ,0
LUMPM,0
PSTRES,0
MODOPT,LANB,20,0,0, ,OFF
/STATUS,SOLU
SOLVE
FINISH
/POST1
SET,LIST,999
SET,,, ,,, ,15
/EFACET,1
PLNSOL, U,Z, 0,1.0
SAVE
FINISH
! /EXIT,ALL
/BATCH
/COM,ANSYS RELEASE 2021 R2           BUILD 21.2      UP20210601       05:24:52
/input,menust,tmp,''
/GST,ON
/PLO,INFO,3
/GRO,CURL,ON
/CPLANE,1
WPSTYLE,,,,,,,,0
RESUME
/COM,ANSYS RELEASE 2021 R2           BUILD 21.2      UP20210601       05:29:58
/PREP7
FINISH
/POST1
SET,LIST,999
SET,,, ,,, ,1
/EFACET,1
PLNSOL, U,SUM, 0,1.0
SET,LIST,999
SET,,, ,,, ,6
/EFACET,1
PLNSOL, U,SUM, 0,1.0
SET,LIST,999
SET,,, ,,, ,15
SET,LIST,999
SET,,, ,,, ,1
SAVE
FINISH
! /EXIT,ALL
