/clear
! -- Start of Macro
/FILNAME, VIBRATION
/TITLE, VIBRATION ANALYSIS
/PREP7
N,1,0
N,21,157.5
!----------------------------------------------!
!-- Define Section ''0-1'' Properties-----!
!----------------------------------------------!
et,1,3
MP,EX,1,2975622460.23
MP,PRXY,1,0.3
MP,DENS,1,145.96
R,1,195.453,1190.675,8.55,,,0
N,2,7.88
MAT,1
REAL,1
E,1,2
!----------------------------------------------!
!-- Define Section ''1-2'' Properties-----!
!----------------------------------------------!
et,2,3
MP,EX,2,3843512344.46
MP,PRXY,2,0.3
MP,DENS,2,266.24
R,2,195.453,1190.675,8.55,,,0
N,3,15.75
MAT,2
REAL,2
E,2,3
!----------------------------------------------!
!-- Define Section ''2-3'' Properties-----!
!----------------------------------------------!
et,3,3
MP,EX,3,4711402228.69
MP,PRXY,3,0.3
MP,DENS,3,373.033
R,3,195.453,1190.675,8.55,,,0
N,4,23.63
MAT,3
REAL,3
E,3,4
!----------------------------------------------!
!-- Define Section ''3-4'' Properties-----!
!----------------------------------------------!
et,4,3
MP,EX,4,5269331439.99
MP,PRXY,4,0.3
M,DENS,4,468.904
R,4,195.453,1190.675,8.55,,,0
N,5,31.5
MAT,4
REAL,4
E,4,5
!----------------------------------------------!
!-- Define Section ''4-5'' Properties-----!
!----------------------------------------------!
et,5,3
MP,EX,5,5703276382.10
MP,PRXY,5,0.3
MP,DENS,5,568.14
R,5,195.453,1190.675,8.55,,,0
N,6,39.38
MAT,5
REAL,5
E,5,6
!----------------------------------------------!
!-- Define Section ''5-6'' Properties-----!
!----------------------------------------------!
et,6,3
MP,EX,6,6044154385.50
MP,PRXY,6,0.3
MP,DENS,6,661.642
R,6,195.453,1190.675,8.55,,,0
N,7,47.25
MAT,6
REAL,6
E,6,7
!----------------------------------------------!
!-- Define Section ''6-7'' Properties-----!
!----------------------------------------------!
et,7,3
MP,EX,7,6260943137.28
MP,PRXY,7,0.3
MP,DENS,7,753.538
R,7,195.453,1190.675,8.55,,,0
N,8,55.13
MAT,7
REAL,7
E,7,8
!----------------------------------------------!
!-- Define Section ''7-8'' Properties-----!
!----------------------------------------------!
et,8,3
MP,EX,8,6446762067
MP,PRXY,8,0.3
MP,DENS,8,841.874
R,8,195.453,1190.675,8.55,,,0
N,9,63
MAT,8
REAL,8
E,8,9
!----------------------------------------------!
!-- Define Section ''8-9'' Properties-----!
!----------------------------------------------!
et,9,3
MP,EX,9,6446762067
MP,PRXY,9,0.3
MP,DENS,9,889.792
R,9,195.453,1190.675,8.55,,,0
N,10,70.88
MAT,9
REAL,9
E,9,10
!----------------------------------------------!
!-- Define Section ''9-10'' Properties-----!
!----------------------------------------------!
et,10,3
MP,EX,10,6446762067
MP,PRXY,10,0.3
MP,DENS,10,895.930
R,10,195.453,1190.675,8.55,,,0
N,11,78.75
MAT,10
REAL,10
E,10,11
!----------------------------------------------!
!-- Define Section ''10-11'' Properties-----!
!----------------------------------------------!
et,11,3
MP,EX,11,6446762067
MP,PRXY,11,0.3
MP,DENS,11,896.933
R,11,195.453,1190.675,8.55,,,0
N,12,86.63
MAT,11
REAL,11
E,11,12
!----------------------------------------------!
!-- Define Section ''11-12'' Properties-----!
!----------------------------------------------!
et,12,3
MP,EX,12,6446762067
MP,PRXY,12,0.3
MP,DENS,12,883.737
R,12,195.453,1190.675,8.55,,,0
N,13,94.5
MAT,12
REAL,12
E,12,13
!----------------------------------------------!
!-- Define Section ''12-13'' Properties-----!
!----------------------------------------------!
et,13,3
MP,EX,13,6446762067
MP,PRXY,13,0.3
MP,DENS,13,832.036
R,13,195.453,1190.675,8.55,,,0
N,14,102.38
MAT,13
REAL,13
E,13,14
!----------------------------------------------!
!-- Define Section ''13-14'' Properties-----!
!----------------------------------------------!
et,14,3
MP,EX,14,6446762067
MP,PRXY,14,0.3
MP,DENS,14,751.379
R,14,195.453,1190.675,8.55,,,0
N,15,110.25
MAT,14
REAL,14
E,14,15
!----------------------------------------------!
!-- Define Section ''14-15'' Properties-----!
!----------------------------------------------!
et,15,3
MP,EX,15,6384769933
MP,PRXY,15,0.3
MP,DENS,15,665.123
R,15,195.453,1190.675,8.55,,,0
N,16,118.13
MAT,15
REAL,15
E,15,16
!----------------------------------------------!
!-- Define Section ''15-16'' Properties-----!
!----------------------------------------------!
et,16,3
MP,EX,16,6167797462
MP,PRXY,16,0.3
MP,DENS,16,580.045
R,16,195.453,1190.675,8.55,,,0
N,17,126
MAT,16
REAL,16
E,16,17
!----------------------------------------------!
!-- Define Section ''16-17'' Properties-----!
!----------------------------------------------!
et,17,3
MP,EX,17,5950824991
MP,PRXY,17,0.3
MP,DENS,17,501.892
R,17,195.453,1190.675,8.55,,,0
N,18,133.88
MAT,17
REAL,17
E,17,18
!----------------------------------------------!
!-- Define Section ''17-18'' Properties-----!
!----------------------------------------------!
et,18,3
MP,EX,18,5733852520
MP,PRXY,18,0.3
MP,DENS,18,430.507
R,18,195.453,1190.675,8.55,,,0
N,19,141.75
MAT,18
REAL,18
E,18,19
!----------------------------------------------!
!-- Define Section ''18-19'' Properties-----!
!----------------------------------------------!
et,19,3
MP,EX,19,5516880049
MP,PRXY,19,0.3
MP,DENS,19,329.192
R,19,195.453,1190.675,8.55,,,0
N,20,149.63
MAT,19
REAL,19
E,19,20
!----------------------------------------------!
!-- Define Section ''19-20'' Properties-----!
!----------------------------------------------!
et,20,3
MP,EX,20,4835141539
MP,PRXY,20,0.3
MP,DENS,20,201.177
R,20,195.453,1190.675,8.55,,,0
N,21,157.5
MAT,20
REAL,20
E,20,21
!----------------------------------------------!
!-- Plot Everything------------------------!
!----------------------------------------------!
/PNUM,node,1
/PNUM,MAT,1
/PNUM,ELEM,1
!----------------------------------------------!
!-- Plot Everything------------------------!
!----------------------------------------------!
!--Set analysis type as model
ANTYPE, MODAL
!--Ask for 6 modes, 2 to be excluded
MODOPT, LANB, 8
!----------------------------------------------!
!--Set Boundaries------------------------!
!----------------------------------------------!
D,ALL,UX,0
!----------------------------------------------!
!--SOLVE------------------------!
!----------------------------------------------!
/SOLU
solve
/post1
!-- Get a list of frequencies
set,list
finish
